# ============================================================
# PolyJarvis LAMMPS Engine - Tg Sweep Staircase
# T_START=440.0 → T_END=100.0 K, step=20.0 K
# 18 temperature points × 500000 steps/T
# ============================================================

log tg_step.log append
units real
atom_style full
boundary p p p

# --- Force Field Styles ---
pair_style lj/class2/coul/long/kk 9.5 9.5
kspace_style pppm/kk 1e-6
dielectric 1.000000
bond_style class2/kk
angle_style class2/kk
dihedral_style class2/kk
improper_style class2/kk
special_bonds lj/coul 0 0 1
pair_modify mix sixthpower tail yes
neighbor 2.0 bin
neigh_modify delay 0 every 1 check yes
neigh_modify one 4000
package kokkos neigh full comm no

read_data /home/alexzhao/PolyJarvis/data/PEG1/lammps/equil/npt_production/npt_production_out.data


# --- Thermo Output ---
thermo_style custom step time temp press enthalpy etotal ke pe ebond eangle edihed eimp evdwl ecoul elong etail vol lx ly lz density pxx pyy pzz
thermo_modify flush yes
thermo 500

# --- Velocity initialization at T_START (once only — Rule A) ---
velocity all create 440.0 304693 mom yes rot yes dist gaussian

# --- Temperature staircase (inherits momenta across steps — Rule A) ---
variable temps index 440 420 400 380 360 340 320 300 280 260 240 220 200 180 160 140 120 100
label TEMP_LOOP
  timestep 1.0
  fix npt_tg all npt temp ${temps} ${temps} 100.0 iso 1.0 1.0 1000.0
  run 500000
  unfix npt_tg
  print "STAGE COMPLETE: Tg step T=${temps}K P=1.0atm steps=500000"
  next temps
  jump SELF TEMP_LOOP

write_data tg_step_out.data
